// SBML level 2 version 1

model tor_nbt_2006_basic8()

  // Compartments:
  compartment default;
  compartment Cytosol in default = 1 femtolitre;

  // Species:
  species Tap42p in Cytosol = 98.857;
  species Tor12p in Cytosol = 70.907;
  species Tap42pTor12p in Cytosol = 0;
  species Tap42pp in Cytosol = 0;
  species Pph2122p in Cytosol = 318.89;
  species Tap42ppPph2122p in Cytosol = 0;
  species PP2A1 in Cytosol = 0;
  species Tap42ppPP2A1 in Cytosol = 0;
  species Cdc55pTpd3p in Cytosol = 281.86;
  species PP2A2 in Cytosol = 0;
  species Tap42ppPP2A2 in Cytosol = 0;
  species Sit4p in Cytosol = 0;
  species Sap in Cytosol = 516.71;
  species Tip41p in Cytosol = 311.9;
  species Tip41pp in Cytosol = 0;
  species Tip41pTor12p in Cytosol = 0;
  species Tip41ppPP2A1 in Cytosol = 0;
  species Tip41ppPP2A2 in Cytosol = 0;
  species Tip41pTap42p in Cytosol = 0;
  species Fpr1p in Cytosol = 1419.1;
  species Rapamycin in Cytosol = 0;
  species Fpr1pRapamycin in Cytosol = 0;
  species Tor12pFpr1pRapamycin in Cytosol = 0;
  species Tip41ppp in Cytosol = 0;
  species Tip41ppTor12p in Cytosol = 0;
  species Tip41pppPP2A1 in Cytosol = 0;
  species Tip41pppPP2A2 in Cytosol = 0;
  species Tip41ppTap42ppPph2122p in Cytosol = 0;
  species Tap42ppTap42ppPph2122p in Cytosol = 0;
  species Tip41pTap42pp in Cytosol = 0;
  species Tip41ppTap42pp in Cytosol = 0;
  species Pph2122pp in Cytosol = 0;
  species Pph2122pTor12p in Cytosol = 0;
  species Pph2122ppPP2A1 in Cytosol = 0;
  species Pph2122ppPP2A2 in Cytosol = 0;
  species Tap42ppSit4p in Cytosol = 0;
  species Tap42ppTap42ppSit4p in Cytosol = 0;
  species Tip41ppTap42ppSit4p in Cytosol = 0;
  species Sit4pp in Cytosol = 0;
  species Sit4pTor12p in Cytosol = 0;
  species Sit4ppPP2A1 in Cytosol = 0;
  species Sit4ppPP2A2 in Cytosol = 0;
  species Tap42ppp in Cytosol = 0;
  species Tap42ppTor12p in Cytosol = 0;
  species Tap42pppPP2A1 in Cytosol = 0;
  species Tap42pppPP2A2 in Cytosol = 0;
  species Tap42pppSit4p in Cytosol = 0;
  species Tap42pppPph2122p in Cytosol = 0;
  species Tap42pPph2122p in Cytosol = 0;
  species Tap42ppPph2122pPP2A1 in Cytosol = 0;
  species Tap42ppPph2122pPP2A2 in Cytosol = 0;
  species Tap42pSit4p in Cytosol = 0;
  species Tap42ppSit4pPP2A1 in Cytosol = 0;
  species Tap42ppSit4pPP2A2 in Cytosol = 0;
  species Tip41ppSit4p in Cytosol = 0;
  species Tip41ppTap42p in Cytosol = 0;
  species Tip41pSap in Cytosol = 0;
  species Tip41ppSap in Cytosol = 0;

  // Reactions:
  RXN1_r_irr_1_f: Tap42p + Tor12p => Tap42pTor12p; k1*Tap42p*Tor12p;
    k1 = 381.91;
  RXN1_r_irr_2_b: Tap42pTor12p => Tap42p + Tor12p; k2*Tap42pTor12p;
    k2 = 173.03;
  RXN1_r_irr_3_f: Tap42pTor12p => Tor12p + Tap42p; RXN1_r_irr_3_f_k3*Tap42pTor12p;
    RXN1_r_irr_3_f_k3 = 433.73;
  RXN2_r_irr_4_f: Tap42pp + Pph2122p => Tap42ppPph2122p; k4*Tap42pp*Pph2122p;
    k4 = 104.12;
  RXN2_r_irr_5_b: Tap42ppPph2122p => Tap42pp + Pph2122p; RXN2_r_irr_5_b_k5*Tap42ppPph2122p;
    RXN2_r_irr_5_b_k5 = 500.63;
  RXN3_r_irr_6_f: Tap42pp + PP2A1 => Tap42ppPP2A1; k6*Tap42pp*PP2A1;
    k6 = 0.42866;
  RXN3_r_irr_7_b: Tap42ppPP2A1 => Tap42pp + PP2A1; RXN3_r_irr_7_b_k7*Tap42ppPP2A1;
    RXN3_r_irr_7_b_k7 = 280.12;
  RXN3_r_irr_8_f: Tap42ppPP2A1 => PP2A1 + Tap42p; RXN3_r_irr_8_f_k8*Tap42ppPP2A1;
    RXN3_r_irr_8_f_k8 = 280.12;
  RXN4_r_irr_9_f: Cdc55pTpd3p + Pph2122p => PP2A1; k9*Cdc55pTpd3p*Pph2122p;
    k9 = 1.2222;
  RXN4_r_irr_10_b: PP2A1 => Cdc55pTpd3p + Pph2122p; RXN4_r_irr_10_b_k10*PP2A1;
    RXN4_r_irr_10_b_k10 = 1000;
  RXN5_r_irr_11_f: Tap42pp + Sit4p => Tap42ppSit4p; RXN5_r_irr_11_f_k11*Tap42pp*Sit4;
    RXN5_r_irr_11_f_k11 = 341.75;
  RXN5_r_irr_12_b: Tap42ppSit4p => Tap42pp + Sit4p; RXN5_r_irr_12_b_k5*Tap42ppSit4;
    RXN5_r_irr_12_b_k5 = 500.63;
  RXN6_r_irr_13_f: Tap42pp + PP2A2 => Tap42ppPP2A2; k12*Tap42pp*PP2A2;
    k12 = 2.2185;
  RXN6_r_irr_14_b: Tap42ppPP2A2 => Tap42pp + PP2A2; RXN6_r_irr_14_b_k7*Tap42ppPP2A2;
    RXN6_r_irr_14_b_k7 = 0.42866;
  RXN6_r_irr_15_f: Tap42ppPP2A2 => PP2A2 + Tap42p; RXN6_r_irr_15_f_k8*Tap42ppPP2A2;
    RXN6_r_irr_15_f_k8 = 280.12;
  RXN7_r_irr_16_f: Sit4p + Sap => PP2A2; RXN7_r_irr_16_f_k13*Sit4p*Sap;
    RXN7_r_irr_16_f_k13 = 4.0755;
  RXN7_r_irr_17_b: PP2A2 => Sit4p + Sap; RXN7_r_irr_17_b_k10*PP2A2;
    RXN7_r_irr_17_b_k10 = 1000;
  RXN8_r_irr_18_f: Tip41p + Tor12p => Tip41pTor12p; k14*Tip41p*Tor12p;
    k14 = 273.28;
  RXN8_r_irr_19_b: Tip41pTor12p => Tip41p + Tor12p; k15*Tip41pTor12p;
    k15 = 986.06;
  RXN8_r_irr_20_f: Tip41pTor12p => Tor12p + Tip41pp; RXN8_r_irr_20_f_k3*Tip41pTor12p;
    RXN8_r_irr_20_f_k3 = 433.73;
  RXN8_r_irr_21_f: Tip41pp + PP2A1 => Tip41ppPP2A1; k16*Tip41pp*PP2A1;
    k16 = 1000;
  RXN8_r_irr_22_b: Tip41ppPP2A1 => Tip41pp + PP2A1; k17*Tip41ppPP2A1;
    k17 = 0.01;
  RXN8_r_irr_23_f: Tip41ppPP2A1 => PP2A1 + Tip41p; RXN8_r_irr_23_f_k8*Tip41ppPP2A1;
    RXN8_r_irr_23_f_k8 = 280.12;
  RXN9_r_irr_24_f: Tip41pp + PP2A2 => Tip41ppPP2A2; k18*Tip41pp*PP2A2;
    k18 = 0.34497;
  RXN9_r_irr_25_b: Tip41ppPP2A2 => Tip41pp + PP2A2; k19*Tip41ppPP2A2;
    k19 = 170.3;
  RXN9_r_irr_26_f: Tip41ppPP2A2 => PP2A2 + Tip41p; RXN9_r_irr_26_f_k8*Tip41ppPP2A2;
    RXN9_r_irr_26_f_k8 = 280.12;
  RXN10_r_irr_27_f: Tip41p + Tap42p => Tip41pTap42p; k20*Tip41p*Tap42p;
    k20 = 14.978;
  RXN10_r_irr_28_b: Tip41pTap42p => Tip41p + Tap42p; k21*Tip41pTap42p;
    k21 = 917.52;
  RXN11_r_irr_29_f: Fpr1p + Rapamycin => Fpr1pRapamycin; k22*Fpr1p*Rapamycin;
    k22 = 0.0001;
  RXN11_r_irr_30_b: Fpr1pRapamycin => Fpr1p + Rapamycin; k22s*Fpr1pRapamycin;
    k22s = 0.0005;
  RXN12_r_irr_31_f: Tor12p + Fpr1pRapamycin => Tor12pFpr1pRapamycin; k23*Tor12p*Fpr1pRapamycin;
    k23 = 456.76;
  RXN12_r_irr_32_b: Tor12pFpr1pRapamycin => Tor12p + Fpr1pRapamycin; k24*Tor12pFpr1pRapamycin;
    k24 = 842.74;
  RXN13_r_irr_33_f: Tip41pp + Tor12p => Tip41ppTor12p; k25*Tip41pp*Tor12p;
    k25 = 0;
  RXN13_r_irr_34_b: Tip41ppTor12p => Tip41pp + Tor12p; k26*Tip41ppTor12p;
    k26 = 0;
  RXN13_r_irr_35_f: Tip41ppTor12p => Tor12p + Tip41ppp; k27*Tip41ppTor12p;
    k27 = 0;
  RXN14_r_irr_36_f: Tip41ppp + PP2A1 => Tip41pppPP2A1; k28*Tip41ppp*PP2A1;
    k28 = 0;
  RXN14_r_irr_37_b: Tip41pppPP2A1 => Tip41ppp + PP2A1; k29*Tip41pppPP2A1;
    k29 = 0;
  RXN14_r_irr_38_f: Tip41pppPP2A1 => PP2A1 + Tip41pp; k30*Tip41pppPP2A1;
    k30 = 0;
  RXN15_r_irr_39_f: Tip41ppp + PP2A2 => Tip41pppPP2A2; k31*Tip41ppp*PP2A2;
    k31 = 0;
  RXN15_r_irr_40_b: Tip41pppPP2A2 => Tip41ppp + PP2A2; k32*Tip41pppPP2A2;
    k32 = 0;
  RXN15_r_irr_41_f: Tip41pppPP2A2 => PP2A2 + Tip41pp; k33*Tip41pppPP2A2;
    k33 = 0;
  RXN16_r_irr_42_f: Tap42pp + Pph2122p => Tap42ppPph2122p; RXN16_r_irr_42_f_k34*Tap42pp*Pph2122p;
    RXN16_r_irr_42_f_k34 = 0;
  RXN16_r_irr_43_b: Tap42ppPph2122p => Tap42pp + Pph2122p; RXN16_r_irr_43_b_k35*Tap42ppPph2122p;
    RXN16_r_irr_43_b_k35 = 0;
  RXN17_r_irr_44_f: Tip41pp + Tap42ppPph2122p => Tip41ppTap42ppPph2122p; RXN17_r_irr_44_f_k36*Tip41pp*Tap42ppPph2122p;
    RXN17_r_irr_44_f_k36 = 0;
  RXN17_r_irr_45_b: Tip41ppTap42ppPph2122p => Tip41pp + Tap42ppPph2122p; RXN17_r_irr_45_b_k37*Tip41ppTap42ppPph2122p;
    RXN17_r_irr_45_b_k37 = 0;
  RXN18_r_irr_46_f: Tap42pp + Tap42ppPph2122p => Tap42ppTap42ppPph2122p; RXN18_r_irr_46_f_k38*Tap42pp*Tap42ppPph2122p;
    RXN18_r_irr_46_f_k38 = 0;
  RXN18_r_irr_47_b: Tap42ppTap42ppPph2122p => Tap42pp + Tap42ppPph2122p; RXN18_r_irr_47_b_k39*Tap42ppTap42ppPph2122p;
    RXN18_r_irr_47_b_k39 = 0;
  RXN19_r_irr_48_f: Tip41p + Tap42pp => Tip41pTap42pp; k40*Tip41p*Tap42pp;
    k40 = 0;
  RXN19_r_irr_49_b: Tip41pTap42pp => Tip41p + Tap42pp; k41*Tip41pTap42pp;
    k41 = 0;
  RXN20_r_irr_50_f: Tip41pp + Tap42pp => Tip41ppTap42pp; k42*Tip41pp*Tap42pp;
    k42 = 0;
  RXN20_r_irr_51_b: Tip41ppTap42pp => Tip41pp + Tap42pp; k43*Tip41ppTap42pp;
    k43 = 0;
  RXN21_r_irr_52_f: Pph2122p + Tor12p => Pph2122pTor12p; k44*Pph2122p*Tor12p;
    k44 = 0;
  RXN21_r_irr_53_b: Pph2122pTor12p => Pph2122p + Tor12p; k45*Pph2122pTor12p;
    k45 = 0;
  RXN21_r_irr_54_f: Pph2122pTor12p => Tor12p + Pph2122pp; k46*Pph2122pTor12p;
    k46 = 0;
  RXN22_r_irr_55_f: Pph2122pp + PP2A1 => Pph2122ppPP2A1; k47*Pph2122pp*PP2A1;
    k47 = 0;
  RXN22_r_irr_56_b: Pph2122ppPP2A1 => Pph2122pp + PP2A1; k48*Pph2122ppPP2A1;
    k48 = 0;
  RXN22_r_irr_57_f: Pph2122ppPP2A1 => PP2A1 + Pph2122p; k49*Pph2122ppPP2A1;
    k49 = 0;
  RXN23_r_irr_58_f: Pph2122pp + PP2A2 => Pph2122ppPP2A2; k50*Pph2122pp*PP2A2;
    k50 = 0;
  RXN23_r_irr_59_b: Pph2122ppPP2A2 => Pph2122pp + PP2A2; k51*Pph2122ppPP2A2;
    k51 = 0;
  RXN23_r_irr_60_f: Pph2122ppPP2A2 => PP2A2 + Pph2122p; k52*Pph2122ppPP2A2;
    k52 = 0;
  RXN24_r_irr_61_f: Cdc55pTpd3p + Pph2122pp => PP2A1; k53*Cdc55pTpd3p*Pph2122pp;
    k53 = 0;
  RXN24_r_irr_62_b: PP2A1 => Cdc55pTpd3p + Pph2122pp; k54*PP2A1;
    k54 = 0;
  RXN25_r_irr_63_f: Tap42pp + Pph2122p => Tap42ppPph2122p; RXN25_r_irr_63_f_k34*Tap42pp*Pph2122p;
    RXN25_r_irr_63_f_k34 = 0;
  RXN25_r_irr_64_b: Tap42ppPph2122p => Tap42pp + Pph2122p; RXN25_r_irr_64_b_k35*Tap42ppPph2122p;
    RXN25_r_irr_64_b_k35 = 0;
  RXN26_r_irr_65_f: Tip41pp + Tap42ppPph2122p => Tip41ppTap42ppPph2122p; RXN26_r_irr_65_f_k36*Tip41pp*Tap42ppPph2122p;
    RXN26_r_irr_65_f_k36 = 0;
  RXN26_r_irr_66_b: Tip41ppTap42ppPph2122p => Tip41pp + Tap42ppPph2122p; RXN26_r_irr_66_b_k37*Tip41ppTap42ppPph2122p;
    RXN26_r_irr_66_b_k37 = 0;
  RXN26_r_irr_67_f: Tip41ppTap42ppPph2122p => Tap42ppPph2122p + Tip41p; k55*Tip41ppTap42ppPph2122p;
    k55 = 0;
  RXN27_r_irr_68_f: Tap42pp + Tap42ppPph2122p => Tap42ppTap42ppPph2122p; RXN27_r_irr_68_f_k38*Tap42pp*Tap42ppPph2122p;
    RXN27_r_irr_68_f_k38 = 0;
  RXN27_r_irr_69_b: Tap42ppTap42ppPph2122p => Tap42pp + Tap42ppPph2122p; RXN27_r_irr_69_b_k39*Tap42ppTap42ppPph2122p;
    RXN27_r_irr_69_b_k39 = 0;
  RXN27_r_irr_70_f: Tap42ppTap42ppPph2122p => Tap42ppPph2122p + Tap42p; k56*Tap42ppTap42ppPph2122p;
    k56 = 0;
  RXN28_r_irr_71_f: Tip41ppPP2A1 => Tip41p + PP2A1; k57*Tip41ppPP2A1;
    k57 = 0;
  RXN29_r_irr_72_f: Tip41ppPP2A2 => Tip41p + PP2A2; k58*Tip41ppPP2A2;
    k58 = 0;
  RXN30_r_irr_73_f: Tap42pp + Sit4p => Tap42ppSit4p; RXN30_r_irr_73_f_k59*Tap42pp*Sit4p;
    RXN30_r_irr_73_f_k59 = 0;
  RXN30_r_irr_74_b: Tap42ppSit4p => Tap42pp + Sit4p; RXN30_r_irr_74_b_k60*Tap42ppSit4p;
    RXN30_r_irr_74_b_k60 = 0;
  RXN31_r_irr_75_f: Tap42pp + Tap42ppSit4p => Tap42ppTap42ppSit4p; RXN31_r_irr_75_f_k61*Tap42pp*Tap42ppSit4p;
    RXN31_r_irr_75_f_k61 = 0;
  RXN31_r_irr_76_b: Tap42ppTap42ppSit4p => Tap42pp + Tap42ppSit4p; RXN31_r_irr_76_b_k62*Tap42ppTap42ppSit4p;
    RXN31_r_irr_76_b_k62 = 0;
  RXN32_r_irr_77_f: Tip41pp + Tap42ppSit4p => Tip41ppTap42ppSit4p; RXN32_r_irr_77_f_k63*Tip41pp*Tap42ppSit4p;
    RXN32_r_irr_77_f_k63 = 0;
  RXN32_r_irr_78_b: Tip41ppTap42ppSit4p => Tip41pp + Tap42ppSit4p; RXN32_r_irr_78_b_k64*Tip41ppTap42ppSit4p;
    RXN32_r_irr_78_b_k64 = 0;
  RXN33_r_irr_79_f: Tap42pp + Sit4p => Tap42ppSit4p; RXN33_r_irr_79_f_k59*Tap42pp*Sit4p;
    RXN33_r_irr_79_f_k59 = 0;
  RXN33_r_irr_80_b: Tap42ppSit4p => Tap42pp + Sit4p; RXN33_r_irr_80_b_k60*Tap42ppSit4p;
    RXN33_r_irr_80_b_k60 = 0;
  RXN34_r_irr_81_f: Tap42pp + Tap42ppSit4p => Tap42ppTap42ppSit4p; RXN34_r_irr_81_f_k61*Tap42pp*Tap42ppSit4p;
    RXN34_r_irr_81_f_k61 = 0;
  RXN34_r_irr_82_b: Tap42ppTap42ppSit4p => Tap42pp + Tap42ppSit4p; RXN34_r_irr_82_b_k62*Tap42ppTap42ppSit4p;
    RXN34_r_irr_82_b_k62 = 0;
  RXN34_r_irr_83_f: Tap42ppTap42ppSit4p => Tap42ppSit4p + Tap42p; k65*Tap42ppTap42ppSit4p;
    k65 = 0;
  RXN35_r_irr_84_f: Tip41pp + Tap42ppSit4p => Tip41ppTap42ppSit4p; RXN35_r_irr_84_f_k63*Tip41pp*Tap42ppSit4p;
    RXN35_r_irr_84_f_k63 = 0;
  RXN35_r_irr_85_b: Tip41ppTap42ppSit4p => Tip41pp + Tap42ppSit4p; RXN35_r_irr_85_b_k64*Tip41ppTap42ppSit4p;
    RXN35_r_irr_85_b_k64 = 0;
  RXN35_r_irr_86_f: Tip41ppTap42ppSit4p => Tap42ppSit4p + Tip41p; k66*Tip41ppTap42ppSit4p;
    k66 = 0;
  RXN36_r_irr_87_f: Sit4p + Tor12p => Sit4pTor12p; k67*Sit4p*Tor12p;
    k67 = 0;
  RXN36_r_irr_88_b: Sit4pTor12p => Sit4p + Tor12p; k68*Sit4pTor12p;
    k68 = 0;
  RXN36_r_irr_89_f: Sit4pTor12p => Tor12p + Sit4pp; k69*Sit4pTor12p;
    k69 = 0;
  RXN37_r_irr_90_f: Sit4pp + PP2A1 => Sit4ppPP2A1; k70*Sit4pp*PP2A1;
    k70 = 0;
  RXN37_r_irr_91_b: Sit4ppPP2A1 => Sit4pp + PP2A1; k71*Sit4ppPP2A1;
    k71 = 0;
  RXN37_r_irr_92_f: Sit4ppPP2A1 => PP2A1 + Sit4p; k72*Sit4ppPP2A1;
    k72 = 0;
  RXN38_r_irr_93_f: Sit4pp + PP2A2 => Sit4ppPP2A2; k73*Sit4pp*PP2A2;
    k73 = 0;
  RXN38_r_irr_94_b: Sit4ppPP2A2 => Sit4pp + PP2A2; k74*Sit4ppPP2A2;
    k74 = 0;
  RXN38_r_irr_95_f: Sit4ppPP2A2 => PP2A2 + Sit4p; k75*Sit4ppPP2A2;
    k75 = 0;
  RXN39_r_irr_96_f: Sit4pp + Sap => PP2A2; k76*Sit4pp*Sap;
    k76 = 0;
  RXN39_r_irr_97_b: PP2A2 => Sit4pp + Sap; k77*PP2A2;
    k77 = 0;
  RXN40_r_irr_98_f: Tap42pp + Tor12p => Tap42ppTor12p; k78*Tap42pp*Tor12p;
    k78 = 0;
  RXN40_r_irr_99_b: Tap42ppTor12p => Tap42pp + Tor12p; k79*Tap42ppTor12p;
    k79 = 0;
  RXN40_r_irr_100_f: Tap42ppTor12p => Tor12p + Tap42ppp; k80*Tap42ppTor12p;
    k80 = 0;
  RXN41_r_irr_101_f: Tap42ppp + PP2A1 => Tap42pppPP2A1; k81*Tap42ppp*PP2A1;
    k81 = 0;
  RXN41_r_irr_102_b: Tap42pppPP2A1 => Tap42ppp + PP2A1; k82*Tap42pppPP2A1;
    k82 = 0;
  RXN41_r_irr_103_f: Tap42pppPP2A1 => PP2A1 + Tap42pp; k83*Tap42pppPP2A1;
    k83 = 0;
  RXN42_r_irr_104_f: Tap42ppp + PP2A2 => Tap42pppPP2A2; k84*Tap42ppp*PP2A2;
    k84 = 0;
  RXN42_r_irr_105_b: Tap42pppPP2A2 => Tap42ppp + PP2A2; k85*Tap42pppPP2A2;
    k85 = 0;
  RXN42_r_irr_106_f: Tap42pppPP2A2 => PP2A2 + Tap42pp; k86*Tap42pppPP2A2;
    k86 = 0;
  RXN43_r_irr_107_f: Tap42ppp + Sit4p => Tap42pppSit4p; k87*Tap42ppp*Sit4p;
    k87 = 0;
  RXN43_r_irr_108_b: Tap42pppSit4p => Tap42ppp + Sit4p; k88*Tap42pppSit4p;
    k88 = 0;
  RXN44_r_irr_109_f: Tap42ppp + Pph2122p => Tap42pppPph2122p; k89*Tap42ppp*Pph2122p;
    k89 = 0;
  RXN44_r_irr_110_b: Tap42pppPph2122p => Tap42ppp + Pph2122p; k90*Tap42pppPph2122p;
    k90 = 0;
  RXN45_r_irr_111_f: Tap42ppPph2122p + Cdc55pTpd3p => Tap42ppPP2A1; k91*Tap42ppPph2122p*Cdc55pTpd3p;
    k91 = 0;
  RXN45_r_irr_112_b: Tap42ppPP2A1 => Tap42ppPph2122p + Cdc55pTpd3p; k92*Tap42ppPP2A1;
    k92 = 0;
  RXN45_r_irr_112add_b: Tap42ppPP2A1 => Tap42p + PP2A1; k93*Tap42ppPP2A1;
    k93 = 0;
  RXN47_r_irr_113_f: Tap42ppSit4p + Sap => Tap42ppPP2A2; k94*Tap42ppSit4p*Sap;
    k94 = 0;
  RXN47_r_irr_114_b: Tap42ppPP2A2 => Tap42ppSit4p + Sap; k95*Tap42ppPP2A2;
    k95 = 0;
  RXN47_r_irr_114add_b: Tap42ppPP2A2 => Tap42p + PP2A2; k96*Tap42ppPP2A2;
    k96 = 0;
  RXN49_r_irr_115_f: Tap42ppPph2122p + PP2A1 => Tap42ppPph2122pPP2A1; k97*Tap42ppPph2122p*PP2A1;
    k97 = 0;
  RXN49_r_irr_116_b: Tap42ppPph2122pPP2A1 => Tap42ppPph2122p + PP2A1; k98*Tap42ppPph2122pPP2A1;
    k98 = 0;
  RXN49_r_irr_117_f: Tap42ppPph2122pPP2A1 => PP2A1 + Tap42pPph2122p; k99*Tap42ppPph2122pPP2A1;
    k99 = 0;
  RXN50_r_irr_118_f: Tap42ppPph2122p + PP2A2 => Tap42ppPph2122pPP2A2; k100*Tap42ppPph2122p*PP2A2;
    k100 = 0;
  RXN50_r_irr_119_b: Tap42ppPph2122pPP2A2 => Tap42ppPph2122p + PP2A2; k101*Tap42ppPph2122pPP2A2;
    k101 = 0;
  RXN50_r_irr_120_f: Tap42ppPph2122pPP2A2 => PP2A2 + Tap42pPph2122p; k102*Tap42ppPph2122pPP2A2;
    k102 = 0;
  RXN51_r_irr_121_f: Tap42ppSit4p + PP2A1 => Tap42ppSit4pPP2A1; k103*Tap42ppSit4p*PP2A1;
    k103 = 0;
  RXN51_r_irr_122_b: Tap42ppSit4pPP2A1 => Tap42ppSit4p + PP2A1; k104*Tap42ppSit4pPP2A1;
    k104 = 0;
  RXN51_r_irr_123_f: Tap42ppSit4pPP2A1 => PP2A1 + Tap42pSit4p; k105*Tap42ppSit4pPP2A1;
    k105 = 0;
  RXN52_r_irr_124_f: Tap42ppSit4p + PP2A2 => Tap42ppSit4pPP2A2; k106*Tap42ppSit4p*PP2A2;
    k106 = 0;
  RXN52_r_irr_125_b: Tap42ppSit4pPP2A2 => Tap42ppSit4p + PP2A2; k107*Tap42ppSit4pPP2A2;
    k107 = 0;
  RXN52_r_irr_126_f: Tap42ppSit4pPP2A2 => PP2A2 + Tap42pSit4p; k108*Tap42ppSit4pPP2A2;
    k108 = 0;
  RXN53_r_irr_127_f: Tap42p + Pph2122p => Tap42pPph2122p; RXN53_r_irr_127_f_k109*Tap42p*Pph2122p;
    RXN53_r_irr_127_f_k109 = 0;
  RXN53_r_irr_128_b: Tap42pPph2122p => Tap42p + Pph2122p; RXN53_r_irr_128_b_k110*Tap42pPph2122p;
    RXN53_r_irr_128_b_k110 = 0;
  RXN54_r_irr_129_f: Tap42p + Sit4p => Tap42pSit4p; RXN54_r_irr_129_f_k111*Tap42p*Sit4p;
    RXN54_r_irr_129_f_k111 = 0;
  RXN54_r_irr_130_b: Tap42pSit4p => Tap42p + Sit4p; RXN54_r_irr_130_b_k112*Tap42pSit4p;
    RXN54_r_irr_130_b_k112 = 0;
  RXN55_r_irr_131_f: Tap42ppPP2A1 => Tap42p + PP2A1; k113*Tap42ppPP2A1;
    k113 = 0;
  RXN56_r_irr_132_f: Tap42ppPP2A2 => Tap42p + PP2A2; k114*Tap42ppPP2A2;
    k114 = 0;
  RXN57_r_irr_133_f: Tip41pp + Sit4p => Tip41ppSit4p; k115*Tip41pp*Sit4p;
    k115 = 0;
  RXN57_r_irr_134_b: Tip41ppSit4p => Tip41pp + Sit4p; k116*Tip41ppSit4p;
    k116 = 0;
  RXN57_r_irr_135_f: Tip41ppSit4p => Sit4p + Tip41p; k117*Tip41ppSit4p;
    k117 = 0;
  RXN58_r_irr_136_f: Tip41pp + Tap42p => Tip41ppTap42p; k118*Tip41pp*Tap42p;
    k118 = 0;
  RXN58_r_irr_137_b: Tip41ppTap42p => Tip41pp + Tap42p; k119*Tip41ppTap42p;
    k119 = 0;
  RXN59_r_irr_138_f: Tap42p + Pph2122p => Tap42pPph2122p; RXN59_r_irr_138_f_k109*Tap42p*Pph2122p;
    RXN59_r_irr_138_f_k109 = 0;
  RXN59_r_irr_139_b: Tap42pPph2122p => Tap42p + Pph2122p; RXN59_r_irr_139_b_k110*Tap42pPph2122p;
    RXN59_r_irr_139_b_k110 = 0;
  RXN60_r_irr_140_f: Tap42p + Sit4p => Tap42pSit4p; RXN60_r_irr_140_f_k111*Tap42p*Sit4p;
    RXN60_r_irr_140_f_k111 = 0;
  RXN60_r_irr_141_b: Tap42pSit4p => Tap42p + Sit4p; RXN60_r_irr_141_b_k112*Tap42pSit4p;
    RXN60_r_irr_141_b_k112 = 0;
  RXN61_r_irr_142_f: Tip41p + Sap => Tip41pSap; k128*Tip41p*Sap;
    k128 = 0;
  RXN61_r_irr_143_b: Tip41pSap => Tip41p + Sap; k129*Tip41pSap;
    k129 = 0;
  RXN62_r_irr_144_f: Tip41pp + Sap => Tip41ppSap; k130*Tip41pp*Sap;
    k130 = 0;
  RXN62_r_irr_145_b: Tip41ppSap => Tip41pp + Sap; k131*Tip41ppSap;
    k131 = 0;
  RXNS2v1_r_irr_146_f: Tap42ppPP2A1 => Tap42p + PP2A1; k120*Tap42ppPP2A1;
    k120 = 0;
  RXNS2v2_r_irr_147_f: Tap42ppPP2A2 => Tap42p + PP2A2; k121*Tap42ppPP2A2;
    k121 = 0;
  RXNS2v3_r_irr_148_f: Tip41pTor12p => Tip41pp + Tor12p; k122*Tip41pTor12p;
    k122 = 0;
  RXNS2v4_r_irr_149_f: Tip41ppPP2A1 => Tip41p + PP2A1; k123*Tip41ppPP2A1;
    k123 = 0;
  RXNS2v5_r_irr_150: Tip41ppPP2A2 => Tip41p + PP2A2; k124*Tip41ppPP2A2;
    k124 = 0;
  RXNS2v6_r_irr_151_f: Tap42pp + Sit4p => Tap42ppSit4p; RXNS2v6_r_irr_151_f_k11*Tap42pp*Sit4p;
    RXNS2v6_r_irr_151_f_k11 = 0;
  RXNS2v6_r_irr_151_b: Tap42ppSit4p => Tap42pp + Sit4p; k125*Tap42ppSit4p;
    k125 = 0;
  RXNS2v7_r_irr_152_f: Sit4p + Sap => PP2A2; RXNS2v7_r_irr_152_f_k13*Sit4p*Sap;
    RXNS2v7_r_irr_152_f_k13 = 0;
  RXNS2v7_r_irr_152_b: PP2A2 => Sit4p + Sap; k126*PP2A2;
    k126 = 0;
  RXNS2v8_r_irr_153_f: Tap42pp + PP2A2 => Tap42ppPP2A2; k12*Tap42pp*PP2A2;
    RXNS2v8_r_irr_153_f_k13 = 0;
  RXNS2v8_r_irr_153_b: Tap42ppPP2A2 => Tap42pp + PP2A1; k127*Tap42ppPP2A2;
    k127 = 0;

  // Unit definitions:
  unit femtolitre = 1 / (10 litre)^15;
  unit micromolar = 1 / ((10 mole)^6 * 10 litre);
end
